*Heading
*****************************************************************
**
** UNITS: Length - millimeter,
**        Time - sec,
**        Force - Newton,
**        Stress - 1e6 Pa = MPa,
**        Mass - 1e3 kg,
**        Energy - 1e-3 Joule,
**
*****************************************************************
**
** Single-edge-notched specimen with initial crack length a=0.5mm
**
** Material properties for PDMS  (Figure 2 and 3)     -->  use *Solid Section, elset=allele, material=PDMS
**                                                             *Material, name=PDMS
**                     for TangoPlus (Figure 4 and 5) -->  use *Solid Section, elset=allele, material=TP
**                                                             *Material, name=TP
**
*****************************************************************
*Node
1,2.440158,1.000000
2,2.379829,1.000000
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**
*User Element,Type=U1,Nodes=4,Coordinates=2,Properties=7,Iproperties=2,Variables=80,Unsymm
1,2,11
**
*Element, type=U1
       1,    1022,      73,    1043,      72
       2,      73,      74,    1044,    1043
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*Element, type=CPS4
100001,1022,73,1043,72
100002,73,74,1044,1043
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*Nset, nset=allele, generate
1, 11070, 1
*Elset, elset=allele, generate
1, 10982, 1
*Solid Section, elset=allele, material=PDMS
**Solid Section, elset=allele, material=TP
,
*Elset, elset=elDummy, generate
100001, 110982, 1
*Solid section, elset=ElDummy, material=DummyMaterial
,
*Nset, nset=top, unsorted
     558,     559,     560,     561,     562,     563,
     564,     565,     566,    1030,    1031,
*Nset, nset=bottom, unsorted
    1011,    1012,    1013,    1014,    1015,    1016,
    1017,    1018,    1019,    1041,    1042,
*Nset, nset=xfixed
    1042,
**
*****************************************************************
**
** MATERIALS
**
*****************************************************************
**
*Material, name=PDMS
*uel property,elset=allele
** Gshear0,ENK,Eb_bar,Kbulk,erff,lc,zeta
** nlSdv, ngSdv
0.38e0, 1.8e0, 30e0, 38e0, 1.4e0, 0.08e0, 1e-3, 4,
4
**
**Material, name=TP
**uel property,elset=allele
** Gshear0,ENK,Eb_bar,Kbulk,erff,lc,zeta
** nlSdv, ngSdv
0.24e0, 10e0, 10e0, 24e0, 0.18e0, 1.0e0, 5e-1, 4,
4
**
*Material, name=DummyMaterial
*Elastic
1.e-20
*User output variables
4
*Density
1.0
*Specific heat
1.0
**
*****************************************************************
**
** INITIAL CONDITIONS
**
*****************************************************************
*Initial conditions, type=temperature
allele,0.0
**
*****************************************************************
** STEP: Step-1
**
*Step, name=Step-1, nlgeom=YES, inc=500000, unsymm=yes
*Coupled temperature-displacement, stabilize, ALLSDTOL=0, deltmx=2e-2
1e0, 30, 1e-8, 1e0
*CONTROLS, PARAMETERS=TIME INCREMENTATION
10,,,,,10,,20
*SOLUTION TECHNIQUE, TYPE = SEPARATED
*Boundary
bottom, 2
xfixed, 1
*Boundary, amplitude=const_rate1
top, 2, 2
*amplitude,name=const_rate1,value=absolute,definition=tabular
0,0,30,3,
**Restart, write, frequency=1, overlay
*Output, field, time interval=1, time marks=no
*node output, nset=allele
u,nt,RF
*Element output, elset=ElDummy
le,uvarm
*Output, history, variable=PRESELECT
*End Step
*****************************************************************
** STEP: Step-2
**
*Step, name=Step-2, nlgeom=YES, inc=500000, unsymm=yes
*Coupled temperature-displacement, stabilize, ALLSDTOL=0, deltmx=2e-2
1e-2, 120, 1e-8, 1e-2
*CONTROLS, PARAMETERS=TIME INCREMENTATION
10,,,,,10,,20
*SOLUTION TECHNIQUE, TYPE = SEPARATED
*Boundary
bottom, 2
xfixed, 1
*Boundary, amplitude=const_rate2
top, 2, 2
*amplitude,name=const_rate2,value=absolute,definition=tabular
0,3,60,9,120,15,
**Restart, write, frequency=1, overlay
*Output, field, frequency=100, time marks=no
*node output, nset=allele
u,nt,RF
*Element output, elset=ElDummy
le,uvarm
*Output, history, variable=PRESELECT
*End Step
